// SBML level 2 version 4

model untitled()

  // Compartments:
  compartment default = 1 volume;
  compartment c1 in default = 1 volume;

  // Species:
  species Enzyme_1 in c1 = 1;
  species s4 in c1 = 1; s4 is "Substrate";
  species Enzyme_2 in c1 = 1;
  species C2 in c1 = 0;
  species C1 in c1 = 0;
  species s13 in c1 = 0; s13 is "Substrate";
  species s14 in c1 = 0; s14 is "Substrate";

  // Reactions:
  re2: Enzyme_1 + s4 => C1; Enzyme_1*s4*re2_k1;
    re2_k1 = 1 substance;
  re3: Enzyme_2 + s4 => C2; Enzyme_2*s4*re3_k1;
    re3_k1 = 1 substance;
  re4: C2 => Enzyme_2 + s4; C2*re4_k1;
    re4_k1 = 1 substance;
  re5: C1 => Enzyme_1 + s4; C1*re5_k1;
    re5_k1 = 1 substance;
  re6: C2 => s14 + Enzyme_2; C2*re6_k1;
    re6_k1 = 1 substance;
  re7: C1 => s13 + Enzyme_1; C1*re7_k1;
    re7_k1 = 1 substance;
  re8: s14 => s4; s14*re8_k1;
    re8_k1 = 1 substance;
  re9: s13 => s4; s13*re9_k1;
    re9_k1 = 1 substance;

  // Unit definitions:
  unit substance = mole;
  unit volume = litre;
  unit area = metre^2;
  unit length = metre;
  unit time = second;
end
